SCL_F
CPU_f := 16*10^6
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SCL_f := 125*10^3
eTWBR := 14
4^64 = 3.40282e38
SCL_f == CPU_f/(16 + 2*TWBR*4^TWPS) solve, TWBR → 56/4^TWPS
TWPS := 1
SCL_f == CPU_f/(16 + 2*TWBR*4^TWPS) solve, TWBR → 14 = 14
CPU_f/(16 + 2*TWBR*4^TWPS) → 16000000/(8*TWBR + 16) =  # error: This variable is undefined. Check that the label is set correctly.
TWPS := 4
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SCL_f == CPU_f/(16 + 2*TWBR*4^TWPS) solve, TWBR, factor → 7*2^-5 = 0.21875
CPU_f/(16 + 2*TWBR*4^TWPS) → 16000000/(512*TWBR + 16) =  # error
TWPS := 16
SCL_f == CPU_f/(16 + 2*TWBR*4^TWPS) solve, TWBR → 7/536870912 = 1.30385e-8
TWPS := 64
SCL_f == CPU_f/(16 + 2*TWBR*4^TWPS) solve, TWBR → 7/42535295865117307932921825928971026432
